<?xml version="1.0"?>

<rotor name="as330_rotor">

    <diameter  unit="M"> 15 </diameter>
    <numblades>  4 </numblades>
     <sense>-1</sense>
    <gearratio> 7.40</gearratio>
    <nominalrpm> 270.0 </nominalrpm>

  <minrpm>2</minrpm>
  <maxrpm>310</maxrpm>
  <chord unit="M">  0.54</chord>
  <liftcurveslope>  5.86 </liftcurveslope>
  <flappingmoment unit="SLUG*FT2"> 944.08  </flappingmoment>
  <twist> -0.13962634 </twist><!-- -8deg-->
  <massmoment> 55 </massmoment>
  <tiplossfactor> 0.98 </tiplossfactor>
  <polarmoment unit="SLUG*FT2"> 3900</polarmoment>
  <inflowlag>  0.14</inflowlag>
  <hingeoffset unit="M"> 0.0 </hingeoffset>

  <maxbrakepower unit="HP">20</maxbrakepower>

  <groundeffectexp> 0.07</groundeffectexp>
  <groundeffectshift unit="M">  0.0</groundeffectshift>

</rotor>
