<?xml version="1.0"?>
<!--
MILTHRUST   [LBS]
MAXTHRUST   [LBS]
idlen1      [%]
maxn1       [%]
betarangeend[%]
    if ThrottleCmd < betarangeend/100.0 then engine power=idle, propeller pitch
    is controled by ThrottleCmd (between MINPITCH and  REVERSEPITCH).
    if ThrottleCmd > betarangeend/100.0 then engine power increases up to max reverse power
reversemaxpower [%]
    max engine power in reverse mode
maxpower    [HP]
psfc power specific fuel consumption [pph/HP] for N1=100%
n1idle_max_delay [-] time constant for N1 change
maxstartenginetime [sec]
    after this time the automatic starting cycle is interrupted when the engine
    doesn't start (0=automatic starting not present)
startern1   [%]
    when starting starter spin up engine to this spin
ielumaxtorque [lb.ft]
    if torque>ielumaxtorque limiters decrease the throttle
    (ielu = Integrated Electronic Limiter Unit)
itt_delay [-] time constant for ITT change
    (ITT = Inter Turbine Temperature)
-->

<turboprop_engine name="turbomeca_turmo">
    <milthrust unit="LBS">      7056.0     </milthrust>
  <idlen1>                       60.0   </idlen1>
  <maxn1>                       100.0   </maxn1>
  <maxpower unit="HP">          3150   </maxpower>
  <psfc unit="LBS/HR/HP">         0.669 </psfc>
  <!--<idlefuelflow>                 50.0   </idlefuelflow>-->
  <n1idle_max_delay>              1     </n1idle_max_delay>
  <maxstartingtime>              50     </maxstartingtime>
  <startern1>                    20     </startern1>
  <ielumaxtorque unit="FT*LB"> 30000     </ielumaxtorque>
  <itt_delay>                     0.05  </itt_delay>
  <betarangeend>                 64     </betarangeend>
  <reversemaxpower>              60     </reversemaxpower>

  <!-- Real Propulsion Two  turboprop  but defined as only one engine[0]
 Simulate Only one Engine power => <tableData breakPoint="1">
 Simulate Both Engine power => <tableData breakPoint="2">
 Simulate None Engine power => <tableData breakPoint="0">  -->

  <table name="EnginePowerVC">
    <description> Engine power, function of airspeed and pressure </description>
    <independentVar lookup="row">atmosphere/P-sl-psf</independentVar>
    <independentVar lookup="column">velocities/ve-kts</independentVar>
    <independentVar lookup="table">propulsion/power-eng-active</independentVar>
     <tableData breakPoint="0">
			0	50	100	150	200	250
    503	0.0	0.0	0.0	0.0	0.0	0.0
    2213	0.0	0.0	0.0	0.0	0.0	0.0
    </tableData>
     <tableData breakPoint="1">
	 	0	50	100	150	200	250
    503	0.1785	0.19	0.2	0.2125	0.2285	0.243
    1048	0.293	0.2945	0.3	0.3105	0.325	0.343
    1328	0.3535	0.3605	0.3655	0.3785	0.393	0.4105
    1496	0.3895	0.393	0.404	0.4105	0.4285	0.45
    1684	0.425	0.4285	0.437	0.45	0.4715	0.4895
    1896	0.457	0.4645	0.473	0.4855	0.5	0.5285
    2135	0.5	0.5055	0.5145	0.5215	0.5415	0.575
    2213	0.5145	0.5215	0.5285	0.5395	0.557	0.5855
    </tableData>
    <tableData breakPoint="2">
			0     50    100    150    200    250
       503   0.357  0.380  0.400  0.425  0.457  0.486
      1048   0.586  0.589  0.600  0.621  0.650  0.686
      1328   0.707  0.721  0.731  0.757  0.786  0.821
      1496   0.779  0.786  0.808  0.821  0.857  0.900
      1684   0.850  0.857  0.874  0.900  0.943  0.979
      1896   0.914  0.929  0.946  0.971  1      1.057
      2135   1      1.011  1.029  1.043  1.083  1.150
      2213   1.029  1.043  1.057  1.079  1.114  1.171
    </tableData>
  </table>

  <!--<table name="EnginePowerRPM_N1" type="internal">
    <description> Engine Power, function of RPM and N1 </description>
    <tableData>
                                00.00000	05.00000	60.00000	86.00000	94.00000	95.00000	96.00000	97.00000	98.00000	99.00000	100.00000	101.00000
        -40.00000	00.00000	00.62857	00.62857        00.62857	00.62857	00.62857	00.62857	00.62857	00.62857	00.62857	00.62857	00.62857
        800.00000	00.00000	02.25000	157.50000	900.00000	1575.00000	1710.00000	1890.00000	2070.00000	2250.00000	2385.00000	2610.00000	2790.00000
        1200.00000	00.00000	02.25000	135.00000	1035.00000	1800.00000	1935.00000	2115.00000	2272.50000	2475.00000	2655.00000	2880.00000	3060.00000
        1600.00000	00.00000	02.25000	22.50000	1080.00000	1980.00000	2137.50000	2295.00000	2475.00000	2677.50000	2835.00000	3060.00000	3240.00000
        2000.00000	00.00000	00.45000	00.45000	1012.50000	2025.00000	2227.50000	2362.50000	2542.50000	2745.00000	2925.00000	3150.00000	3352.50000
        2200.00000	00.00000	00.45000	00.45000	922.50000	1980.00000	2160.00000	2317.50000	2520.00000	2722.50000	2902.50000	3127.50000	3343.50000
    </tableData>
  </table>-->
  <table name="EnginePowerRPM_N1" type="internal">
    <description> Engine Power, function of RPM and N1 </description>
    <tableData>
		00.00000		05.00000		60.00000		86.00000		94.00000		95.00000		96.00000		97.00000		98.00000		99.00000		100.00000	101.00000
-40		00.00000		00.62857		00.62857        00.62857		00.62857		00.62857		00.62857		00.62857		00.62857		00.62857		00.62857		00.62857
800		00.00000		02.02500		141.75000	810.00000	1417.50000	1539.00000	1701.00000	1863.00000	2025.00000	2146.50000	2349.00000	2511.0
1200	00.00000		02.02500		121.50000	931.50000	1620.00000	1741.50000	1903.50000	2045.25000	2227.50000	2389.50000	2592.00000	2754.0
1600	00.00000		02.02500		20.25000		972.00000	1782.00000	1923.75000	2065.50000	2227.50000	2409.75000	2551.50000	2754.00000	2916.0
2000	00.00000		00.40500		12.55500		911.25000	1822.50000	2004.75000	2126.25000	2288.25000	2470.50000	2632.50000	2835.00000	3017.25
2200	00.00000		00.40500		08.50500		830.25000	1782.00000	1944.00000	2085.75000	2268.00000	2450.25000	2612.25000	2814.75000	3009.15

<!--800.00000		00.00000	01.57500	110.25000	630.00000	1102.50000	1197.00000	1323.00000	1449.00000	1575.00000	1669.50000	1827.00000	1953.00000
1200.00000		00.00000	01.57500	94.50000	724.50000	1260.00000	1354.50000	1480.50000	1590.75000	1732.50000	1858.50000	2016.00000	2142.00000
1600.00000		00.00000	01.57500	15.75000	756.00000	1386.00000	1496.25000	1606.50000	1732.50000	1874.25000	1984.50000	2142.00000	2268.00000
2000.00000		00.00000	00.31500	09.76500	708.75000	1417.50000	1559.25000	1653.75000	1779.75000	1921.50000	2047.50000	2205.00000	2346.75000
2200.00000		00.00000	00.31500	06.61500	645.75000	1386.00000	1512.00000	1622.25000	1764.00000	1905.75000	2031.75000	2189.25000	2340.45000-->

<!--800.00000		00.00000	01.35000	94.50000	540.00000	945.00000	1026.00000	1134.00000	1242.00000	1350.00000	1431.00000	1566.00000	1674.00000
1200.00000		00.00000	01.35000	81.00000	621.00000	1080.00000	1161.00000	1269.00000	1363.50000	1485.00000	1593.00000	1728.00000	1836.00000
1600.00000		00.00000	01.35000	13.50000	648.00000	1188.00000	1282.50000	1377.00000	1485.00000	1606.50000	1701.00000	1836.00000	1944.00000
2000.00000		00.00000	00.27000	08.37000	607.50000	1215.00000	1336.50000	1417.50000	1525.50000	1647.00000	1755.00000	1890.00000	2011.50000
2200.00000		00.00000	00.27000	05.67000	553.50000	1188.00000	1296.00000	1390.50000	1512.00000	1633.50000	1741.50000	1876.50000	2006.10000-->
</tableData>
  </table>


  <table name="ITT_N1" type="internal">
    <description> Inter-Turbine Temperature ITT [deg C] depending on N1 and engine run (0=off / 1=running) </description>
    <tableData>
              0     1
        0     0     0
       15   100   100
       60   180   520
       96   270   680
      100   280   730
    </tableData>
  </table>

</turboprop_engine>
